#Simple chute wear test

atom_style    superquadric
atom_modify   map array
boundary      f f f
newton        off

communicate   single vel yes

units         si

region        domain block -0.5 0.1 -0.2 0.2 -0.4 0.15 units box
create_box    1 domain

neighbor      0.002 bin
neigh_modify  delay 0


#Material properties required for new pair styles

fix  m1 all property/global youngsModulus peratomtype 5.e6
fix  m2 all property/global poissonsRatio peratomtype 0.45
fix  m3 all property/global coefficientRestitution peratomtypepair 1 0.3
fix  m4 all property/global coefficientFriction peratomtypepair 1 0.5
fix  m5 all property/global k_finnie peratomtypepair 1 1.0
fix  m6 all property/global coefficientRollingFriction peratomtypepair 1 0.05

# New pair style
pair_style gran model hertz tangential history rolling_friction epsd2 surface superquadric #Hertzian without cohesion
pair_coeff  * *

timestep    0.00001

fix  gravi all gravity 9.81 vector 0.0 0.0 -1.0

#the chute
fix  cad all mesh/surface/stress file meshes/simple_chute.stl type 1 wear finnie
fix  inface all mesh/surface file meshes/insertion_face.stl type 1
fix  granwalls all wall/gran model hertz tangential history rolling_friction epsd2 surface superquadric mesh n_meshes 1 meshes cad


#distributions for insertion
fix  pts1 all particletemplate/superquadric 15485863 atom_type 1 density constant 2500 shape constant 0.0015 0.0025 0.0035 blockiness constant 4.0 4.0
fix  pdd1 all particledistribution/discrete 32452843 1 pts1 1.0

#region and insertion
group  nve_group region domain
region bc cylinder z 0.0 0.0 0.015 0.05 0.12 units box

#particle insertion
fix    ins nve_group insert/stream seed 32452867 distributiontemplate pdd1 &
       nparticles 6000 massrate 0.1 insert_every 1000 overlapcheck yes all_in no vel constant 0.0 0.0 -1.0 &
       orientation random insertion_face inface

#apply nve integration to all particles that are inserted as single particles
fix    integr all nve/superquadric integration_scheme 1

#output settings, include total thermal energy
thermo_style  custom step atoms ke
thermo        1000
thermo_modify lost ignore norm no

#insert the first particles so that dump is not empty
run    1
# dump   dmp all custom/vtk 200 post/chute_*.vtk id type type x y z ix iy iz vx vy vz fx fy fz omegax omegay omegaz radius
dump   dmp all custom/vtk 200 post/dump*.superq.vtk type mass x y z id vx vy vz fx fy fz omegax omegay omegaz radius shapex shapey shapez quat1 quat2 quat3 quat4 blockiness1 blockiness2 tqx tqy tqz angmomx angmomy angmomz

dump   dumpstress all mesh/gran/VTK 200 post/mesh_*.vtk stress wear cad

#insert particles
run    100000 upto
unfix  ins
